VAX := READPRN("C:\Users\Muhammdali\Desktop\sxem.DNO")
Id3 := max(VAX[:, 1])
nMax := match(Id3, VAX[:, 1])
nMax = [198; 199; 200]
Ud3 := VAX[:, 0]*50
nId1 := match(Id3/4, VAX[:, 1])
nId2 := match(Id3/2, VAX[:, 1])
nId1 = [130; 131; 132; 133; 134; 135]
nId2 = [154; 155; 156; 157; 158]
Ud1 := linterp(VAX[:, 0], VAX[:, 1], Id3/4)
Ud2 := linterp(VAX[:, 0], VAX[:, 1], Id3/2)
Rb := (Ud1 - 2*Ud2 + Ud3)/Id3
NFt := ((3*Ud2 - 2*Ud1) - Ud3)/ln(2)
